*Heading
** Job name: Job-5 Model name: Model-2
** Generated by: Abaqus/CAE 2020
*Preprint, echo=NO, model=NO, history=NO, contact=NO
**
** PARTS
**
*Part, name=Part
*Node
      1, -0.200000003, -0.200000003,  0.400000006
      2, -0.200000003, -0.150000006,  0.400000006
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*Element, type=C3D8R
  1,  82,  83,  92,  91,   1,   2,  11,  10
  2,  83,  84,  93,  92,   2,   3,  12,  11
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*Nset, nset=Set-1, generate
   1,  729,    1
*Elset, elset=Set-1, generate
   1,  512,    1
** Section: Section-1
*Solid Section, elset=Set-1, material=Material-1
,
*End Part
**
**
** ASSEMBLY
**
*Assembly, name=Assembly
**
*Instance, name=Part-1, part=Part
         0.2,          0.2,         -0.4
*End Instance
**
*Nset, nset=Set-3, instance=Part-1, generate
   9,  729,    9
*Elset, elset=Set-3, instance=Part-1, generate
   8,  512,    8
*Nset, nset=_PickedSet4, internal, instance=Part-1, generate
   1,  721,    9
*Elset, elset=_PickedSet4, internal, instance=Part-1, generate
   1,  505,    8
*End Assembly
**
** MATERIALS
**
*Material, name=Material-1
*Density
 1.5e-06,
*Hyperelastic, neo hooke
100., 0.0008
**
** BOUNDARY CONDITIONS
**
** Name: BC-1 Type: Symmetry/Antisymmetry/Encastre
*Boundary
_PickedSet4, ENCASTRE
** ----------------------------------------------------------------
**
** STEP: Step-1
**
*Step, name=Step-1, nlgeom=YES
*Static
1., 1., 1e-05, 1.
**
** BOUNDARY CONDITIONS
**
** Name: BC-2 Type: Displacement/Rotation
*Boundary
Set-3, 1, 1, 0.2
Set-3, 2, 2, 0.3
Set-3, 3, 3, 0.2
**
** OUTPUT REQUESTS
**
*Restart, write, frequency=0
**
** FIELD OUTPUT: F-Output-1
**
*Output, field, variable=PRESELECT
**
** HISTORY OUTPUT: H-Output-1
**
*Output, history, variable=PRESELECT
*EL PRINT
DG
*End Step
